*Heading
** Job name: gel_rheometer Model name: Model-1
** Generated by: Abaqus/CAE 2024
*Preprint, echo=NO, model=NO, history=NO, contact=NO
**
** PARTS
**
*Part, name=bottom
*End Part
**
*Part, name=gel
*Node
      1,   1732.05078,         140.,        1000.
      2,   17320.5078,         140.,       10000.
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*Element, type=C3D8
   1,  303,  821, 2770,  806, 3656, 4174, 6123, 4159
   2,  804, 1208, 1059,  808, 4157, 4561, 4412, 4161
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*Nset, nset=gel, generate
    1,  6706,     1
*Elset, elset=gel, generate
    1,  3226,     1
** Section: gel
*Solid Section, elset=gel, material=UD
** ,
*End Part
** ----------------------------------------------------------------
**                        PARAMETERS
** ----------------------------------------------------------------
*INCLUDE, input=material_param.inp
** ----------------------------------------------------------------
**                         SECTIONS
** ----------------------------------------------------------------
** Section: gel
*INCLUDE, file=sec_gel.inp
**
*Part, name=top
*End Part
**
**
** ASSEMBLY
**
*Assembly, name=Assembly
**
*Instance, name=gel-1, part=gel
*End Instance
**
*Instance, name=bottom-1, part=bottom
*Node
      1,       20000.,       -2000.,           0.
*Nset, nset=bottom-1-RefPt_, internal
1,
*Surface, type=REVOLUTION, name=master_bottom
START,           0.,           0.
 LINE,       20000.,           0.
 LINE,       20000.,       -2000.
 LINE,           0.,       -2000.
*Rigid Body, ref node=bottom-1-RefPt_, analytical surface=master_bottom
*End Instance
**
*Instance, name=top-1, part=top
*Node
      1,        2000.,         140.,           0.
*Nset, nset=top-1-RefPt_, internal
1,
*Surface, type=REVOLUTION, name=master_top
START,           0.,        7140.
 LINE,        5000.,        7140.
 LINE,        5000.,        2140.
 LINE,       20000.,        2140.
 LINE,       20000.,         140.
 LINE,        2000.,         140.
 LINE,           0.,         140.
*Rigid Body, ref node=top-1-RefPt_, analytical surface=master_top
*End Instance
**
*Nset, nset=bottom_rp, instance=bottom-1
 1,
*Nset, nset=top_rp, instance=top-1
 1,
*Elset, elset=_slave_bottom_S2, internal, instance=gel-1, generate
    1,  3226,     1
*Surface, type=ELEMENT, name=slave_bottom
_slave_bottom_S2, S2
*Elset, elset=_slave_top_S1, internal, instance=gel-1, generate
    1,  3226,     1
*Surface, type=ELEMENT, name=slave_top
_slave_top_S1, S1
** Constraint: tie_bottom
*Tie, name=tie_bottom, adjust=yes
slave_bottom, bottom-1.master_bottom
** Constraint: tie_top
*Tie, name=tie_top, adjust=yes
slave_top, top-1.master_top
*End Assembly
**
** MATERIALS
**
*Material, name=gel
*Hyperelastic, neo hooke
1., 0.0005
**
** BOUNDARY CONDITIONS
**
** Name: fix_bottom Type: Displacement/Rotation
*Boundary
bottom_rp, 1, 1
bottom_rp, 2, 2
bottom_rp, 3, 3
bottom_rp, 4, 4
bottom_rp, 5, 5
bottom_rp, 6, 6
** ----------------------------------------------------------------
**
** STEP: rotation
**
*Step, name=rotation, nlgeom=YES
*Static
0.1, 1., 1e-05, 0.1
**
** BOUNDARY CONDITIONS
**
** Name: top_rotation Type: Displacement/Rotation
*Boundary
top_rp, 1, 1
top_rp, 2, 2
top_rp, 3, 3
top_rp, 4, 4
top_rp, 5, 5, 0.0021
top_rp, 6, 6
**
** OUTPUT REQUESTS
**
*Restart, write, frequency=0
**
** FIELD OUTPUT: F-Output-1
**
*Output, field, variable=PRESELECT
**
** HISTORY OUTPUT: H-Output-1
**
*Output, history, variable=PRESELECT
*End Step
